** ======================================================================
** Stage 4 "dry": the same tail and the same actuation, but WITHOUT water
** (CalculiX alone, no preCICE) – reference for the amplitude in water.
** Based on solid-calculix/flap.inp from the perpendicular-flap tutorial.
** ======================================================================
** Mesh, sets and material are generated by: python ../../tools/make_geometry.py solid .
*INCLUDE, INPUT=tail.msh
*INCLUDE, INPUT=tail_sets.nam
*INCLUDE, INPUT=material.inc
** Chamber pressure time histories (empty file = passive tail)
*INCLUDE, INPUT=amplitude.inc
**
** NLGEOM: large deflections (geometrically nonlinear analysis).
** INC: max. number of increments – must be >= T_END / DT.
*STEP, NLGEOM, INC=1000000
** Dynamic analysis (tail inertia). DIRECT = fixed time increment,
** equal to the preCICE time window.
** SOLVER=PARDISO: Intel MKL, ~1.6x faster than SPOOLES (NOTES.md).
** ALPHA = -0.2: HHT scheme with numerical damping of HIGH frequencies
** (the tutorial has 0.0). Without it the undamped axial modes of the soft tail
** (~30 Hz) made Newton diverge – even without water (NOTES.md). HHT damping
** grows like (omega*dt)^3, so at 1–3 Hz it is negligible.
*DYNAMIC, ALPHA=-0.2, DIRECT, SOLVER=PARDISO
0.0025, 8
**
** Root glued to the rigid head: fully clamped
*BOUNDARY
Nfix, 1, 3
** 2D model: z is fixed at all nodes
*BOUNDARY
Nall, 3, 3
**
** Water forces: the preCICE adapter overwrites these zero nodal loads
** on the interface (Nsurface set) in every coupling iteration.
*CLOAD
Nsurface, 1, 0.0
Nsurface, 2, 0.0
Nsurface, 3, 0.0
**
** Chamber pressure (empty file = passive tail)
*INCLUDE, INPUT=dload.inc
**
** Output: displacements to .frd (ParaView/cgx) every 10 increments,
** tip displacement to .dat at every increment
*NODE FILE, FREQUENCY=10
U
*NODE PRINT, NSET=Ntip, FREQUENCY=1
U
*END STEP
